# Міністерство освіти і науки України
# Національний технічний університет України
# "Київський політехнічний інститут ім. Ігоря Сікорського"
# Розрахункова графічна робота
# "Виконання кусочно-лінійної апроксимації"
# Варіант №31
Виконав
# студент групи ІВ-92
# Бабенко Вікторія
# Київ - 2021
# 1. Побудувати графік функції y=f(x) для діапазону зміни аргументу x_min<=x<=x_max.
# Значення y=f(x), x_min та x_max узяти з таблиці варіантів.
x_min := -π/2
x_max := π/2
f(x) :=
    -sqrt(cos(x)) if x ≤ 0
    sqrt(cos(x)) - 2 if x ≥ 0
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# 2. Визначити другу похідну функції
d^2*y/dx^2
# та побудувати її графік для діапазону зміни
# аргументу
# x_min<=x<=x_max.
d2f(x) :=
    d^2/dx^2(-sqrt(cos(x))) if x ≤ 0
    d^2/dx^2(sqrt(cos(x)) - 2) if x ≥ 0
d^2/dx^2(sqrt(cos(x))) → -sin(x)^2/(4*cos(x)^(3/2)) - sqrt(cos(x))/2
d^2/dx^2(-sqrt(cos(x))) → sin(x)^2/(4*cos(x)^(3/2)) + sqrt(cos(x))/2
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# 3. Побудувати графік модулю другої похідної функції | |d^2*y/dx^2|
# для діапазону зміни аргументу x_min<=x<=x_max.
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# 4.1 Точки перегину
# 4. Проаналізувати графік нелініної залежності функції y=f(x), з'ясувавши характер
# опуклості та вгнутості функції по частинам, наявність точок перегинання та наявність точок розриву першого роду другої похідної функції.
# Функція має точки перегину в точці x = 0
# 4.2 Опуклість та вгнутість
# f(x) вгнута на відрізку [x_min ; 0].
# f(x) вигнута на відрізку [0 ; x_max].
# 4.3 Точки розриву першого роду другої похідної функції
limit(d^2/dx^2(-sqrt(cos(x))), x → x_min-)
limit(d^2/dx^2(sqrt(cos(x))), x → x_max-) → -∞
□ = ∞  # error: Пустой местозаполнитель.
□ = ∞  # error: Пустой местозаполнитель.
limit(d^2/dx^2(-sqrt(cos(x))), x → x_min+)
limit(d^2/dx^2(sqrt(cos(x))), x → x_max+)
□ = ∞  # error: Пустой местозаполнитель.
□ = -∞  # error: Пустой местозаполнитель.
# Функція має точки розриву: x_min ; x_max.
# 5. Обрати початкову точку(або початкові точки) апроксимації для подальших
# розрахунків, зазначивши її (або їх) на графіках y == f(x) та |d^2*y/dx^2| , визначивши абсцису цієї початкової точки або абсциси початкових точок x_0^1,x_0^2 тощо).
x_01 := x_min
y_11 := f(x_01) = -7.82498e-9
y_21 := |d2f(x_01)| = 1.25798e-11
x_02 := x_max
y_12 := f(x_02) = -2
y_22 := |d2f(x_02)| = 1.25798e-11
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# 6. По графіку |d^2*y/dx^2| обрати напрямок (або напрямки) розрахунків значень
# h[i] == x[i] - x[i - 1] (i=1,n) від початкової точки(або від початкових точок) та зазначити  його(або їх) на цьому графіку у вигляді стрілок над графіком |d^2*y/dx^2|.
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# 7. Визначити методику розрахунку значень h_i (i=1,n) та обрати формулу для розрахунку значень: h[i] == sqrt(8*Δf_max/A[i]) або h[i] == sqrt(16*Δf_max/A[i]), де A[i] - максимальне по модулю значення другої похідної на і-й частині ломаної лінії, що розраховується.
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h_m := 0.025622
x_m := x_min
b_m := (f(x_m + h_m) - f(x_m))/h_m → -6.247
f1(x) := -sqrt(cos(x))
F(x) := f(x_m) + b_m*(x - x_m)
Δf(x) := f1(x) - F(x)
d/dx(Δf(x)) → sin(x)/(2*sqrt(cos(x))) + 6.247
x_k := 0.1
Given
sin(x_k)/(2*sqrt(cos(x_k))) + 11.9522 == b_m
x_kk := Find(x_k) = -1.57004
Δf_max := |Δf(x_kk)| → 0.0228
# 8. Підібрати таке значення похибки Δf_max, при якому в результаті розрахунків  h_i (i=1,n) отримаємо n=8 або n=9, тобто отримаємо апроксимуючу ломану лінію  з 8 або з 9
# частин. Виконати розрахунок усіх значень h_i (i=1,n) та здійснити нумерацію вузлів (вершин ломаної лінії), починаючи з номера 0.
# Для лівої частини:
X[0] := x_min = -1.5708
h_1 := h_m = 0.025622
X[1] := X[0] + h_m = -1.54517
A[2] := |d2f(X[1])| = 61.0066
h[2] := sqrt(16*Δf_max/A[2]) = 0.077258
X[2] := X[1] + h[2] = -1.46792
A[3] := |d2f(X[2])| = 7.67626
h[3] := sqrt(16*Δf_max/A[3]) = 0.2178
X[3] := X[2] + h[3] = -1.25012
A[4] := |d2f(X[3])| = 1.55302
h[4] := sqrt(16*Δf_max/A[4]) = 0.484221
X[4] := X[3] + h[4] = -0.765896
A[5] := |d2f(X[4])| = 0.620801
h[5] := sqrt(16*Δf_max/A[5]) = 0.765871
X[5] := X[4] + h[5] = -2.44782e-5
# Для правої частини (графік модуля симетричний):
X[10] := |X[0]| = 1.5708
X[9] := |X[1]| = 1.54517
X[8] := |X[2]| = 1.46792
X[7] := |X[3]| = 1.25012
X[6] := |X[4]| = 0.765896
# 9. Здійснити розрахунок абсцис x_i(1, n), починаючи з x_0, початкових ординат y_i^p(0,n), вузлів апроксимації(вершин ломаної лінії), що належать функції y=f(x), та кінцевих ординат y_i^k(0,n), вузлів апроксимації з урахуванням корекції, яку здійснюють для отримання знакозмінної похибки апроксимації.
Yk[j] :=
    Yp[j] - Δf_max if X[j] ≤ 0
    Yp[j] + Δf_max if X[j] ≥ 0  # error: Эта переменная не определена.
# Виходячи з 8-го завдання, шукаємо ординати вершин ломаної лінії:
j := 0 .. 10
Yp[j] := f(X[j])
Yk[j] :=
    Yp[j] - Δf_max if X[j] ≤ 0
    Yp[j] + Δf_max if X[j] ≥ 0
Yk[5] := Yp[5]
X = [-1.5708; -1.54517; -1.46792; -1.25012; -0.765896; -2.44782e-5; 0.765896; 1.25012; 1.46792; 1.54517; 1.5708]
Yp = [-7.82498e-9; -0.16006; -0.320466; -0.561437; -0.848977; -1; -1.15102; -1.43856; -1.67953; -1.83994; -2]
Yk = [-0.0227585; -0.182818; -0.343225; -0.584196; -0.871735; -1; -1.12826; -1.4158; -1.65678; -1.81718; -1.97724]
# 10. Побудувати графік апроксимуючої функції (ломаної лінії) y=φ(x), використовуючи отримані значення x_i(1, n) та y_i^k(0,n).
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i := 0 .. 9
k[i] := (Yk[i] - Yk[i + 1])/(X[i] - X[i + 1])
k[i] = [-6.24697; -2.07624; -1.10639; -0.593819; -0.167475; -0.167465; -0.593819; -1.10639; -2.07624; -6.24697]
k == tg(α)
# 11. Здійснити розрахунок значень кутових коефіцієнтів (значень тангенсів кутів нахилу), k_i(i=1,n) лінійних частин ломаної лінії.
# Знаходимо кутові коефіцієнти шляхом ділення різниці ординат на різницю абсцис:
# 12. Виконати розкладання апроксимуючої функції (ломаної лінії) y=φ(x) на окремі
# доданки (лінійні та елементарні нелінійні {лінійні з обмеженням на нульовому рівні)}, починаючи з точки, яка має абсцису x_0^a. Значення x_0^a узяти з таблиці варіантів.
# 13. Над кожним елементарним нелінійним доданком зазначити його квадрант (І, ІІ, ІІІ, IV) та режим {на відкривання (на В) чи на закривання (на З)}
x_a[0] := X[2]
y_e0(x) := Yk[2]
y(x) := y_e0(x)
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b[2] := k[2]
y_e1(x) := b[2]*(x - X[2])
y(x) := y(x) + y_e1(x)
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b[3] := k[3] - k[2]
y_e2(x) :=
    b[3]*(x - X[3]) if b[3]*(x - X[3]) ≥ 0
    0 if b[3]*(x - X[3]) ≤ 0
y(x) := y(x) + y_e2(x)
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# I квадрант, на закривання
b[4] := k[5] - k[3]
y_e2(x) :=
    b[4]*(x - X[4]) if b[4]*(x - X[4]) ≥ 0
    0 if b[4]*(x - X[4]) ≤ 0
y(x) := y(x) + y_e2(x)
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# I квадрант, на закривання
b[6] := k[6] - k[5]
y_e3(x) :=
    b[6]*(x - X[6]) if b[6]*(x - X[6]) ≤ 0
    0 if b[6]*(x - X[6]) ≥ 0
y(x) := y(x) + y_e3(x)
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# ІV квадрант, на відкривання
b[7] := k[7] - k[6]
y_e4(x) :=
    b[7]*(x - X[7]) if b[7]*(x - X[7]) ≤ 0
    0 if b[7]*(x - X[7]) ≥ 0
y(x) := y(x) + y_e4(x)
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# ІV квадрант, на відкривання
b[8] := k[8] - k[7]
y_e5(x) :=
    b[8]*(x - X[8]) if b[8]*(x - X[8]) ≤ 0
    0 if b[8]*(x - X[8]) ≥ 0
y(x) := y(x) + y_e5(x)
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# ІV квадрант, на відкривання
b[9] := k[9] - k[8]
y_e6(x) :=
    b[9]*(x - X[9]) if b[9]*(x - X[9]) ≤ 0
    0 if b[9]*(x - X[9]) ≥ 0
y(x) := y(x) + y_e6(x)
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# ІІ квадрант, на відкривання
b[1] := k[1] - k[2]
y_e7(x) :=
    b[1]*(x - X[2]) if b[1]*(x - X[2]) ≥ 0
    0 if b[1]*(x - X[2]) ≤ 0
y(x) := y(x) + y_e7(x)
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# ІІ квадрант, на відкривання
b[0] := k[0] - k[1]
y_e8(x) :=
    b[0]*(x - X[1]) if b[0]*(x - X[1]) ≥ 0
    0 if b[0]*(x - X[1]) ≤ 0
φ(x) := y(x) + y_e8(x)
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# ІІ квадрант, на відкривання
# 14. Здійснити розрахунок наступних значень:
# - значення φ(x_0^a) для першого лінійного доданку
# - значення b_0=k_0 та x_0 для другого лінійного доданку
# - значення b_i=k_i-k_(i-1) та X_REFi для кожного елементарного нелінійного доданку
# 1) значення φ(x_0^a) для першого лінійного доданку:
φ(x_a[0]) = -0.343225
i := 0 .. 9
j := 0 .. 10
# 2) значення b_0=k_0 та х_0 для другого лінійного доданку:
k[0] = -6.24697
# 3) значення b_i=k_i-k_(i-1) та X_REFi  для кожного елементарного нелінійного доданку:
Xref[j] := X[j]
b[0] = -4.17073
Xref[j] = [-1.5708; -1.54517; -1.46792; -1.25012; -0.765896; -2.44782e-5; 0.765896; 1.25012; 1.46792; 1.54517; 1.5708]
b[i] = [-4.17073; -0.969854; -1.10639; 0.512569; 0.426355; 0; -0.426355; -0.512569; -0.969854; -4.17073]
