# Міністерство освіти і науки України
# Національний технічний університет України
# "Київський політехнічний інститут ім. Ігоря Сікорського"
# Розрахункова графічна робота
# "Виконання кусочно-лінійної апроксимації"
# Варіант №155
Виконав
# студент групи ІО-93
# Верцанов Святослав
# Київ - 2021
# 1. Побудувати графік функції y=f(x) для діапазону зміни аргументу x_min<=x<=x_max.
# Значення y=f(x), x_min та x_max узяти з таблиці варіантів.
x_min := -1
x_max := 1
f(x) :=
    x - log(x + 3) if x ≤ 0
    x^2 - log(x + 3) if x ≥ 0
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# 2. Визначити другу похідну функції
d^2*y/dx^2
# та побудувати її графік для діапазону зміни
# аргументу
# x_min<=x<=x_max.
d2f(x) :=
    d^2/dx^2(x - log(x + 3)) if x ≤ 0
    d^2/dx^2(x^2 - log(x + 3)) if x ≥ 0
d^2/dx^2(x - log(x + 3)) → 1/(ln(10)*(x + 3)^2)
d^2/dx^2(x^2 - log(x + 3)) → 1/(ln(10)*(x + 3)^2) + 2
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# 3. Побудувати графік модулю другої похідної функції | |d^2*y/dx^2|
# для діапазону зміни аргументу x_min<=x<=x_max.
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# 4.1 Точки перегину
# 4. Проаналізувати графік нелініної залежності функції y=f(x), з'ясувавши характер
# опуклості та вгнутості функції по частинам, наявність точок перегинання та наявність
# точок розриву першого роду другої похідної функції.
# Функція не має точок перегину так як друга похідна не змінює знак на відрізку [x_min ; x_max].
# 4.2 Опуклість та вгнутість
# f(x) вигнута на відрізку [x_min  ; x_max].
# 4.3 Точки розриву першого роду другої похідної функції
limit(d^2/dx^2(x - log(x + 3)), x → 0-) → 1/(9*ln(10))
limit(d^2/dx^2(x^2 - log(x + 3)), x → 0-) → (18*ln(10) + 1)/(9*ln(10))
limit(d^2/dx^2(x - log(x + 3)), x → 0+) → 1/(9*ln(10))
limit(d^2/dx^2(x^2 - log(x + 3)), x → 0+) → (18*ln(10) + 1)/(9*ln(10))
# Функція не має точок розриву на відрізку [x_min ; x_max].
# 5. Обрати початкову точку(або початкові точки) апроксимації для подальших
# розрахунків, зазначивши її (або їх) на графіках y == f(x) та |d^2*y/dx^2| , визначивши абсцису
# цієї початкової точки
# (або абсциси початкових точок x_0^1,x_0^2 тощо).
x_01 := -1
y_11 := f(x_01) = -1.30103
y_21 := |d2f(x_01)| = 0.108574
x_02 := 0
y_12 := f(x_02) = -0.477121
y_22 := |d2f(x_02)| = 2.04825
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# 6. По графіку |d^2*y/dx^2| обрати напрямок (або напрямки) розрахунків значень
# h[i] == x[i] - x[i - 1] (i=1,n) від початкової точки(або від початкових точок) та зазначити
# його(або їх) на цьому графіку у вигляді стрілок над графіком |d^2*y/dx^2|.
# 7. Визначити методику розрахунку значень h_i (i=1,n) та обрати формулу для розрахунку значень: h[i] == sqrt(8*Δf_max/A[i]) або h[i] == sqrt(16*Δf_max/A[i]), де A[i] - максимальне по модулю значення
# другої похідної на і-й частині ломаної лінії, що розраховується.
# Для розрахунку на діапазоні x:=[-1;1] h_i (i=1,n) обираємо формулу sqrt(16*Δf_max/A[1]).
# 8. Підібрати таке значення похибки Δf_max, при якому в результаті розрахунків h_i (i=1,n) отримаємо n=8 або n=9, тобто отримаємо апроксимуючу ломану лінію з 8 або з 9
# частин. Виконати розрахунок усіх значень h_i (i=1,n) та здійснити нумерацію вузлів
# (вершин ломаної лінії), починаючи з номера 0.
Δf_max := 0.003538
X[0] := x_min = -1
A[1] := |d2f(X[0])| = 0.108574
h[1] := sqrt(16*Δf_max/A[1]) = 0.722066
X[1] := X[0] + h[1] = -0.277934
A[2] := |d2f(X[1])| = 0.0586121
h[2] := sqrt(16*Δf_max/A[2]) = 0.982755
X[2] := 0
A[3] := |d2f(X[2])| = 2.04825
h[3] := sqrt(16*Δf_max/A[3]) = 0.166244
X[3] := X[2] + h[3] = 0.166244
A[4] := |d2f(X[3])| = 2.04332
h[4] := sqrt(16*Δf_max/A[4]) = 0.166445
X[4] := X[3] + h[4] = 0.332689
A[5] := |d2f(X[4])| = 2.0391
h[5] := sqrt(16*Δf_max/A[5]) = 0.166617
X[5] := X[4] + h[5] = 0.499306
A[6] := |d2f(X[5])| = 2.03547
h[6] := sqrt(16*Δf_max/A[6]) = 0.166766
X[6] := X[5] + h[6] = 0.666072
A[7] := |d2f(X[6])| = 2.03231
h[7] := sqrt(16*Δf_max/A[7]) = 0.166895
X[7] := X[6] + h[7] = 0.832967
A[8] := |d2f(X[7])| = 2.02956
h[8] := sqrt(16*Δf_max/A[8]) = 0.167008
X[8] := X[7] + h[8] = 0.999975
A8 := |d2f(X[7])| = 2.02956
# 9. Здійснити розрахунок абсцис x_i(1, n), починаючи з x_0, початкових ординат y_i^p(0,n),
# вузлів апроксимації(вершин ломаної лінії), що належать функції y=f(x), та кінцевих
# ординат y_i^k(0,n), вузлів апроксимації з урахуванням корекції, яку здійснюють для
# отримання знакозмінної похибки апроксимації.
# Виходячи з 8-го завдання, шукаємо ординати вершин ломаної лінії:
j := 0 .. 8
Yp[j] := f(X[j])
Yk[j] :=
    Yp[j] - Δf_max if X[j] ≤ 0
    Yp[j] + Δf_max if X[j] ≥ 0
X = [-1; -0.277934; 0; 0.166244; 0.332689; 0.499306; 0.666072; 0.832967; 0.999975]
Yk = [-1.30457; -0.716371; -0.473583; -0.469369; -0.408575; -0.291137; -0.117011; 0.113837; 0.401432]
Yp = [-1.30103; -0.712833; -0.477121; -0.472907; -0.412113; -0.294675; -0.120549; 0.110299; 0.397894]
# 10. Побудувати графік апроксимуючої функції (ломаної лінії) y=φ(x), використовуючи
# отримані значення x_i(1, n) та y_i^k(0,n).
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# 11. Здійснити розрахунок значень кутових коефіцієнтів (значень тангенсів кутів нахилу),
# k_i(i=1,n) лінійних частин ломаної лінії.
# Знаходимо кутові коефіцієнти шляхом ділення різниці ординат на різницю абсцис:
i := 0 .. 7
k[i] := (Yk[i] - Yk[i + 1])/(X[i] - X[i + 1])
k[i] = [0.814603; 0.873543; 0.0253483; 0.365253; 0.704835; 1.04414; 1.38319; 1.72204]
k == tg(α)
k[0] = 0.814603
# 12. Виконати розкладання апроксимуючої функції (ломаної лінії) y=φ(x) на окремі
# доданки (лінійні та елементарні нелінійні {лінійні з обмеженням на нульовому рівні)}, починаючи з точки, яка має абсцису x_0^a. Значення x_0^a узяти з таблиці варіантів.
# 13. Над кожним елементарним нелінійним доданком зазначити його квадрант (І, ІІ, ІІІ, IV) та режим {на відкривання (на В) чи на закривання (на З)}
x_a[0] := X[0]
y_e0(x) := Yk[0]
y(x) := y_e0(x)
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b[0] := k[0]
y_e1(x) := b[0]*(x - X[0])
y(x) := y(x) + y_e1(x)
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b[1] := k[1] - k[0]
y_e2(x) :=
    b[1]*(x - X[1]) if b[1]*(x - X[1]) ≥ 0
    0 if b[1]*(x - X[1]) ≤ 0
y(x) := y(x) + y_e2(x)
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# I квадрант, на закривання
b[2] := k[2] - k[1]
y_e3(x) :=
    b[2]*(x - X[2]) if b[2]*(x - X[2]) ≤ 0
    0 if b[2]*(x - X[2]) ≥ 0
y(x) := y(x) + y_e3(x)
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# ІV квадрант, на відкривання
b[3] := k[3] - k[2]
y_e4(x) :=
    b[3]*(x - X[3]) if b[3]*(x - X[3]) ≥ 0
    0 if b[3]*(x - X[3]) ≤ 0
y(x) := y(x) + y_e4(x)
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# І квадрант, на відкривання
b[4] := k[4] - k[3]
y_e5(x) :=
    b[4]*(x - X[4]) if b[4]*(x - X[4]) ≥ 0
    0 if b[4]*(x - X[4]) ≤ 0
y(x) := y(x) + y_e5(x)
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# І квадрант, на відкривання
b[5] := k[5] - k[4]
y_e6(x) :=
    b[5]*(x - X[5]) if b[5]*(x - X[5]) ≥ 0
    0 if b[5]*(x - X[5]) ≤ 0
y(x) := y(x) + y_e6(x)
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# І квадрант, на відкривання
b[6] := k[6] - k[5]
y_e7(x) :=
    b[6]*(x - X[6]) if b[6]*(x - X[6]) ≥ 0
    0 if b[6]*(x - X[6]) ≤ 0
y(x) := y(x) + y_e7(x)
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# І квадрант, на відкривання
b[7] := k[7] - k[6]
y_e8(x) :=
    b[7]*(x - X[7]) if b[7]*(x - X[7]) ≥ 0
    0 if b[7]*(x - X[7]) ≤ 0
φ(x) := y(x) + y_e8(x)
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# ІV квадрант, на відкривання
# 14. Здійснити розрахунок наступних значень:
# - значення φ(x_0^a) для першого лінійного доданку
# - значення b_0=k_0 та x_0 для другого лінійного доданку
# - значення b_i=k_i-k_(i-1) та X_REFi для кожного елементарного нелінійного доданку
# 1) значення φ(x_0^a) для першого лінійного доданку:
φ(x_a[0]) = -1.30457
# 2) значення b_0=k_0 та х_0 для другого лінійного доданку:
b[0] = 0.814603
k[0] = 0.814603
X[0] = -1
# 3) значення b_i=k_i-k_(i-1) та X_REFi  для кожного елементарного нелінійного доданку:
Xref[j] := X[j]
j := 0 .. 8
Xref[j] = [-1; -0.277934; 0; 0.166244; 0.332689; 0.499306; 0.666072; 0.832967; 0.999975]
i := 0 .. 7
b[i] = [0.814603; 0.05894; -0.848195; 0.339905; 0.339582; 0.339301; 0.339057; 0.338843]
